# Умова | Умова
a := 0
b := sqrt(5)/2
f(x) := 1/(5 - x^2)^(3/2)
a := 0
b := sqrt(5)/2
a := 0
b := sqrt(5)/2
f(x) := 1/(5 - x^2)^(3/2)
f(x) := 1/(5 - x^2)^(3/2)
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# Перевірка Методів
# Тіло Методу Сімпсона
n := 20
# Тіло Методу Гауса
G[1] :=
    f1 ← f((a + b)/2 - (b - a)/(2*sqrt(3)))
    f2 ← f((a + b)/2 + (b - a)/(2*sqrt(3)))
    f ← (b - a)/2*(f1 + f2)
integral(f(x), x = a .. b) = 0.11547
h := (b - a)/n = 0.0559017
S[1] := f(a) + f(b) = 0.227149
S[1] :=
    for i ∈ 1, 3 .. n - 1
        x[i] ← a - i*h
        S[1] ← S[1] + 4*f(x[i])
    for j ∈ 2, 4 .. n - 2
        x[j] ← a + j*h
        S[1] ← S[1] + 2*f(x[j])
    S[1]
# Результат Методу Гауса
G[1] = 0.115277  # І
S[1] := (h/3)*S[1] = 0.11547
# Результат Методу Сімпсона
S[1] = 0.11547
